<Lems>

    <!--

        This LEMS file has been automatically generated using PyNeuroML v0.3.5 (libNeuroML v0.2.36)

     -->

    <!-- Specify which component to run -->
    <Target component="L23_PC_cADpyr"/>

    <!-- Include core NeuroML2 ComponentType definitions -->
    <Include file="Cells.xml"/>
    <Include file="Networks.xml"/>
    <Include file="Simulation.xml"/>

    <Include file="L23_cADpyr.stepcurrent3.net.nml"/>
    <Include file="pas.channel.nml"/>
    <Include file="Ih.channel.nml"/>
    <Include file="NaTs2_t.channel.nml"/>
    <Include file="SKv3_1.channel.nml"/>
    <Include file="Im.channel.nml"/>
    <Include file="NaTa_t.channel.nml"/>
    <Include file="K_Tst.channel.nml"/>
    <Include file="Nap_Et2.channel.nml"/>
    <Include file="SK_E2.channel.nml"/>
    <Include file="Ca_HVA.channel.nml"/>
    <Include file="K_Pst.channel.nml"/>
    <Include file="CaDynamics_E2_NML2.nml"/>
    <Include file="Ca_LVAst.channel.nml"/>

    <Simulation id="L23_PC_cADpyr" length="3000ms" step="0.025ms" target="network" seed="1234">  <!-- Note seed: ensures same random numbers used every run -->

        <Display id="DispPop__Pop_cADpyr" title="Membrane potentials of cells in Pop_cADpyr" timeScale="1ms" xmin="-300.0" xmax="3300.0" ymin="-90" ymax="50">
            <Line id="Pop_cADpyr[0]: v" quantity="Pop_cADpyr/0/L23_cADpyr/v" scale="1mV" color="#0b45e0" timeScale="1ms"/>
        </Display>

        <OutputFile id="Volts_file__Pop_cADpyr" fileName="L23_PC_cADpyr.v.dat">
            <OutputColumn id="v_Pop_cADpyr_v" quantity="Pop_cADpyr/0/L23_cADpyr/v"/>
        </OutputFile>

    </Simulation>

</Lems>
